# simulation of three bead model with network percolation and
# conformational change.

# thermal motion is deactivated in this simulation to test intermolecular bonding

##########################################

# user input
variable Nsteps         equal 100000
variable Nwrite         equal   100
variable equilTime      equal  3000
variable seed           equal 349503
variable tstep          equal  0.001
variable boxLength      equal     lx
variable com_cutoff         equal 0.43*lx
variable r_cutoff       equal 1.112462048
##########################################

# configuration
units lj
boundary p p p
atom_style bond         # bead-spring polymer

read_data testingIntermolBonding/testTwoMol.in extra/bond/per/atom 1 extra/special/per/atom 3


labelmap atom 1 stic 2 hinge

group stickers         type 1
group hinges           type 2

# three bead unfolding template loading
molecule folded intramoltemplate/folded_three_bead.data
molecule unfolded intramoltemplate/unfolded_three_bead.data

# intermolecular template loading

molecule pre_ff intermoltemplate/pre_ff.data
#molecule pre_fu intermoltemplate/pre_fu.data
#molecule pre_uu intermoltemplate/pre_uu.data

molecule ssff intermoltemplate/post_stic_stic_ff.data
molecule shff intermoltemplate/post_stic_hinge_ff.data
molecule hhff intermoltemplate/post_hinge_hinge_ff.data

##########################################

#print some system info for analysis

variable Npar equal count(all)

print """
boxLength = ${boxLength}
Npar = ${Npar}
Nsteps = ${Nsteps} + ${equilTime}
Nwrite = ${Nwrite}
equilTime = ${equilTime}
""" file ../analysis/systemData.py

##########################################
# bond potentials

bond_style harmonic
bond_coeff 1 5 ${r_cutoff}        # sticker-hinge   (intra)
bond_coeff 2 5 ${r_cutoff}        # sticker-sticker (intra)
bond_coeff 3 5 ${r_cutoff}        # sticker-sticker (inter)
bond_coeff 4 5 ${r_cutoff}        # sticker-hinge   (inter)
bond_coeff 5 5 ${r_cutoff}        # hinge-hinge     (inter)


##########################################

# count bonds per atom

compute shintra all nbond/atom bond/type 1
compute ssintra all nbond/atom bond/type 2
compute ssinter all nbond/atom bond/type 3
compute shinter all nbond/atom bond/type 4
compute hhinter all nbond/atom bond/type 5


# keep track of bonds across the system

compute totalbonds all count/type bond
variable shintra equal c_totalbonds[1]
variable ssintra equal c_totalbonds[2]
variable ssinter equal c_totalbonds[3]
variable shinter equal c_totalbonds[4]
variable hhinter equal c_totalbonds[5]

#########################################

# find bond id and forces

compute bondedatomid1 all property/local batom1
compute bondedatomid2 all property/local batom2

compute bondforce all bond/local fx fy fz


##########################################

# print thermodynamic info

variable t equal step*${tstep}

thermo ${Nwrite}

##########################################

# add brownian dynamics

fix 1 all nve                             # NVE integrator
fix 2 all langevin   1 1 1.0 ${seed}  # langevin thermostat

##########################################

# equilibration. first energy minimization and then equilibration

comm_modify cutoff 3

pair_style soft ${r_cutoff}
pair_coeff * * 5


minimize 1.0e-4 1.0e-6 1000 10000
fix equilibrate all nve/limit 1

dump 1 all custom ${Nwrite} ../output/testingdump.lammpstrj id x y z type mol c_ssintra c_ssinter c_shinter c_hhinter
dump_modify 1 sort id

timestep 0.0001
run ${equilTime}

unfix equilibrate

##########################################


# pair interactions
# shifted lj to be repulsive wca

#pair_style zero 5.0
pair_style hybrid/overlay zero 5.5 lj/cut 2.5

pair_coeff * * lj/cut 1.0 1.0
pair_coeff * * zero 5.0
pair_modify shift yes


##########################################

# variables for bell equation

compute bondhinge hinges bond/local engpot
compute bondstic stickers bond/local engpot

variable ebarrier equal 0 # energy barrier

##########################################

# bond react

# the only intramolecular reaction is the unfolding process
# the intermolecular reactions are all bond formations between each atom type
fix rxn all bond/react stabilization no reset_mol_ids no &
  react ssff all 1 1.0 1.4 pre_ff ssff intermoltemplate/stic_stic_inter.map molecule inter &
  react shff all 1 1.0 1.4 pre_ff shff intermoltemplate/stic_hinge_inter.map molecule inter &
  react hhff all 1 1.0 1.4 pre_ff hhff intermoltemplate/hinge_hinge_inter.map molecule inter

########################################

# simulate. first minimize energy with nve + langevin. then run for longer

minimize 1.0e-4 1.0e-6 10000 100000

undump 1
reset_timestep 0

dump 1 all custom ${Nwrite} ../output/testingdump.lammpstrj id x y z type mol c_ssintra c_ssinter c_shinter c_hhinter
dump_modify 1 sort id

fix nbondsfile all print 1000 "${t} ${ssintra} ${ssinter} ${shinter} ${hhinter}" file ../output/testingnbonds.dat screen no
dump bondedatoms all local ${Nwrite} ../output/testingbondedatoms.dat index c_bondedatomid1 c_bondedatomid2 c_bondforce[*]

timestep ${tstep}
neighbor 1 bin
neigh_modify every 1 delay 2 check yes

run ${Nsteps}
